**
** ABAQUS Input Deck Generated by HyperMesh Version  : 8.0SR1
** Generated using HyperMesh-Abaqus Template Version : 8.0sr1
**
**   Template:  ABAQUS/STANDARD 3D
**
*NODE
    810190,  2385.1526726202,  -548.4986676673,  412.31954425895
    810191,  2385.4020725969,  -548.4986676205,  414.68956111042
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*ELEMENT,TYPE=S3,ELSET=Middle Surface_H
    720462,    815113,    815114,    815170
    720483,    815211,    815193,    815212
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*ELEMENT,TYPE=S3,ELSET=Middle_Surface_I
    721966,    818124,    818086,    817274
    721987,    818180,    818179,    817381
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*ELEMENT,TYPE=S4,ELSET=Middle Surface_G
    715520,    810545,    810548,    810550,    810544
    715521,    810544,    810550,    810539,    810540
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*ELEMENT,TYPE=S4,ELSET=Middle Surface_H
    720322,    815110,    815111,    815112,    815169
    720323,    815114,    815115,    815116,    815170
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*ELEMENT,TYPE=S4,ELSET=Middle_Surface_I
    721826,    817340,    817312,    818123,    817342
    721827,    817274,    818086,    817341,    818125
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**HWNAME COMP         46 RIGIDS_CON
**HWCOLOR COMP         46     2
*KINEMATIC COUPLING,REF NODE=848416
    815995,1,6
    815996,1,6
    815997,1,6
    815998,1,6
    815999,1,6
    816000,1,6
    816001,1,6
    816002,1,6
    816003,1,6
    816004,1,6
    816091,1,6
    816092,1,6
    816093,1,6
    816094,1,6
    816095,1,6
    816112,1,6
    816114,1,6
    816129,1,6
    816132,1,6
    816136,1,6
*KINEMATIC COUPLING,REF NODE=848417
    816005,1,6
    816006,1,6
    816007,1,6
    816008,1,6
    816009,1,6
    816010,1,6
    816011,1,6
    816012,1,6
    816013,1,6
    816014,1,6
    816097,1,6
    816098,1,6
    816099,1,6
    816100,1,6
    816101,1,6
    816102,1,6
    816103,1,6
    816104,1,6
    816105,1,6
    816121,1,6
    816147,1,6
*KINEMATIC COUPLING,REF NODE=848419
    816785,1,6
    816797,1,6
    816799,1,6
    816800,1,6
    816827,1,6
    816874,1,6
    816903,1,6
    816904,1,6
    817570,1,6
    817581,1,6
    817585,1,6
    817586,1,6
    817588,1,6
    817593,1,6
    817647,1,6
    817648,1,6
    817650,1,6
    817651,1,6
    817669,1,6
    817692,1,6
    817809,1,6
*KINEMATIC COUPLING,REF NODE=848418
    816779,1,6
    816786,1,6
    816788,1,6
    816796,1,6
    816801,1,6
    816804,1,6
    816891,1,6
    816899,1,6
    816900,1,6
    816909,1,6
    817021,1,6
    817678,1,6
    817680,1,6
    817681,1,6
    817684,1,6
    817685,1,6
    817784,1,6
    817785,1,6
    817806,1,6
    817807,1,6
    817808,1,6
**HWNAME COMP         48 RIGIDS_FORCES
**HWCOLOR COMP         48     2
*KINEMATIC COUPLING,REF NODE=848415
    810503,1,6
    810504,1,6
    810505,1,6
    810506,1,6
    810515,1,6
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    815013,1,6
**HWNAME COMP         52 RIGIDS_01
**HWCOLOR COMP         52    41
*MPC
TIE,    810527,    818225
TIE,    810719,    818225
TIE,    810730,    818225
TIE,    810732,    818225
TIE,    810735,    818225
TIE,    810736,    818225
TIE,    810758,    818225
TIE,    810760,    818225
TIE,    810763,    818225
TIE,    810764,    818225
TIE,    810784,    818225
TIE,    810932,    818225
TIE,    810936,    818225
TIE,    810937,    818225
TIE,    810938,    818225
TIE,    810939,    818225
TIE,    810960,    818225
TIE,    810961,    818225
TIE,    810962,    818225
TIE,    810963,    818225
TIE,    817056,    818225
TIE,    817083,    818225
TIE,    817120,    818225
TIE,    817137,    818225
TIE,    817148,    818225
TIE,    817150,    818225
TIE,    817279,    818225
TIE,    817366,    818225
TIE,    817411,    818225
TIE,    817417,    818225
TIE,    817418,    818225
TIE,    817423,    818225
TIE,    817424,    818225
TIE,    817895,    818225
TIE,    817898,    818225
TIE,    817899,    818225
TIE,    817932,    818225
TIE,    817933,    818225
TIE,    817934,    818225
TIE,    817937,    818225
TIE,    818151,    818225
TIE,    818212,    818225
TIE,    818214,    818225
TIE,    818215,    818225
TIE,    818216,    818225
TIE,    814500,    818226
TIE,    814566,    818226
TIE,    814577,    818226
TIE,    814579,    818226
TIE,    814582,    818226
TIE,    814583,    818226
TIE,    814605,    818226
TIE,    814607,    818226
TIE,    814610,    818226
TIE,    814611,    818226
TIE,    814757,    818226
TIE,    814779,    818226
TIE,    814783,    818226
TIE,    814784,    818226
TIE,    814785,    818226
TIE,    814786,    818226
TIE,    814807,    818226
TIE,    814808,    818226
TIE,    814809,    818226
TIE,    814810,    818226
TIE,    815029,    818226
TIE,    815030,    818226
TIE,    815031,    818226
TIE,    815032,    818226
TIE,    815033,    818226
TIE,    815034,    818226
TIE,    815035,    818226
TIE,    815036,    818226
TIE,    815037,    818226
TIE,    815038,    818226
TIE,    815039,    818226
TIE,    815040,    818226
TIE,    815452,    818226
TIE,    815453,    818226
TIE,    815454,    818226
TIE,    815455,    818226
TIE,    815456,    818226
TIE,    815457,    818226
TIE,    815458,    818226
TIE,    815459,    818226
TIE,    815460,    818226
TIE,    815461,    818226
TIE,    815462,    818226
TIE,    815463,    818226
TIE,    815464,    818226
*SHELL SECTION, ELSET=Middle Surface_G, MATERIAL=SPFH540
2.6       ,         5
**HWCOLOR COMP         53    11
*SHELL SECTION, ELSET=Middle Surface_H, MATERIAL=SPFH540
3.2       ,         5
**HWCOLOR COMP         54     7
*SHELL SECTION, ELSET=Middle_Surface_I, MATERIAL=SPFH540
3.2       ,         5
**HWCOLOR COMP         55     7
*MATERIAL, NAME=SPFH540
*DENSITY
7.8500E-09,0.0
*ELASTIC, TYPE = ISOTROPIC
205000.0  ,0.29      ,0.0
*PLASTIC
432.6568  ,0.0       ,0.0
440.654   ,0.006001  ,0.0
450.0291  ,0.009578  ,0.0
465.6513  ,0.014631  ,0.0
475.5776  ,0.017889  ,0.0
484.4594  ,0.021218  ,0.0
490.0161  ,0.023305  ,0.0
504.9025  ,0.029457  ,0.0
515.3103  ,0.034232  ,0.0
520.7548  ,0.03672   ,0.0
536.1949  ,0.045008  ,0.0
541.7793  ,0.048114  ,0.0
552.1915  ,0.048115  ,0.0
567.7356  ,0.054191  ,0.0
573.5365  ,0.064754  ,0.0
591.0221  ,0.069253  ,0.0
609.7424  ,0.084959  ,0.0
616.1904  ,0.105101  ,0.0
629.3182  ,0.113123  ,0.0
632.5585  ,0.12179   ,0.0
636.418   ,0.136575  ,0.0
650.5572  ,0.142658  ,0.0
648.2353  ,0.184457  ,0.0
625.5445  ,0.193284  ,0.0
**HMNAME LOADSTEP          1 B
*STEP, INC =   500, NAME = B, NLGEOM = YES
*STATIC
0.01      ,          ,          ,
**HWNAME LOADCOL          1 CON
**HWCOLOR LOADCOL          1     4
*BOUNDARY
    848419,1,6,0.0
    848418,1,6,0.0
    848417,1,6,0.0
    848416,1,6,0.0
**HWNAME LOADCOL          3 FORCES
**HWCOLOR LOADCOL          3    53
*CLOAD
    848415,1,-520.0845404552
    848415,2,1931.1944411242
    848415,3,-0.318355566378
*NODE FILE
U,
*EL FILE
SINV,
*END STEP
*****
